# OpenSim document version 30000
MarkerSet:
  Marker pHipOrigin : pelvis (-0.05 -0.0686844 0)
  Marker pRightCSI : pelvis (-0.0455149 0.0861143 0.0874403)
  Marker pLeftCSI : pelvis (-0.0390191 0.0854957 -0.0961678)
  Marker pRightIschialTub: pelvis (-0.116364 -0.125046 0.0400483)
  Marker pLeftIschialTub : pelvis (-0.116364 -0.125046 -0.0400483)
  Marker pSacrum: pelvis (-0.175 0.035 0)
  Marker pL5SpinalProcess: torso (-0.0443 0.0085 0)
  Marker pL3SpinalProcess: torso (-0.0493 0.0435 0)
  Marker pT12SpinalProcess: torso (-0.0693 0.1085 0)
  Marker pPX: torso (0.095 0.21 0)
  Marker pIJ: torso (0.04 0.37 0)
  Marker pT4SpinalProcess: torso (-0.102 0.32 0)
  Marker pT8SpinalProcess: torso (-0.098 0.22 0)
  Marker pC7SpinalProcess: torso (-0.075 0.41 0)
  Marker pTopOfHead: torso (0 0.66 0)
  Marker pRightAuricularis: torso (0 0.55 0.075)
  Marker pLeftAuricularis: torso (0 0.55 -0.075)
  Marker pBackOfHead: torso (-0.088 0.58 0)
  Marker pRightAcromion: torso (-0.003 0.405 0.13)
  Marker pLeftAcromion: torso (-0.003 0.405 -0.13)
  Marker pRightArmLatEpicondyle: humerus_r (0.015 -0.28 0.04)
  Marker pRightArmMedEpicondyle: humerus_r (0.00225 -0.286 -0.046)
  Marker pLeftArmLatEpicondyle: humerus_l (0.015 -0.28 -0.04)
  Marker pLeftArmMedEpicondyle: humerus_l (0.00225005 -0.286 0.046)
  Marker pRightUlnarStyloid: ulna_r (-0.03 -0.237 0.005)
  Marker pRightRadialStyloid: radius_r (0.0005 -0.225 0.05)
  Marker pRightOlecranon: ulna_r (-0.04 0.01 0.002)
  Marker pLeftUlnarStyloid: ulna_l (-0.03 -0.238 -0.004) fixed=true
  Marker pLeftRadialStyloid: radius_l (0.0005 -0.225 -0.05)
  Marker pLeftOlecranon: ulna_l (-0.04 0.01 -0.002)
  Marker pRightTopOfHand: hand_r (0.05 -0.15 -0.01)
  Marker pRightPinky: hand_r (0.05 -0.125 -0.045)
  Marker pLeftTopOfHand: hand_l (0.05 -0.15 0.01)
  Marker pLeftPinky: hand_l (0.05 -0.125 0.045)
  Marker pRightGreaterTrochanter: femur_r (-0.01 -0.0348377 0.08)
  Marker pRightKneeLatEpicondyle: femur_r (0 -0.405 0.05)
  Marker pRightKneeMedEpicondyle: femur_r (0 -0.405 -0.05)
  Marker pRightPatella : patella_r (0.028 0.03 0)
  Marker pLeftGreaterTrochanter: femur_l (-0.01 -0.0348377 -0.08)
  Marker pLeftKneeLatEpicondyle: femur_l (0 -0.405 -0.05)
  Marker pLeftKneeMedEpicondyle: femur_l (0 -0.405 0.05)
  Marker pLeftPatella: patella_l (0.028 0.03 0)
  Marker pRightLatMalleolus: tibia_r (-0.005 -0.3888 0.053)
  Marker pRightMedMalleolus: tibia_r (0.006 -0.3888 -0.038)
  Marker pRightTibialTub: tibia_r (0.05 -0.07 0)
  Marker pLeftLatMalleolus: tibia_l (-0.005 -0.3888 -0.053)
  Marker pLeftMedMalleolus: tibia_l (0.006 -0.3888 0.038)
  Marker pLeftTibialTub: tibia_l (0.05 -0.07 0)
  Marker pRightHeelFoot: calcn_r (-0.025 0.02 -0.005)
  Marker pRightFirstMetatarsal: toes_r (0.0262 0.0317308 -0.03108)
  Marker pRightFifthMetatarsal: toes_r (-0.035 0.026 0.058)
  Marker pRightPivotFoot: toes_r (-0.00128497 0.027967 -0.180453)
  Marker pRightHeelCenter: calcn_r (0.0565423 0.0154926 0.00189644)
  Marker pRightToe: toes_r (0.0837604 0.000595256 0.0147577)
  Marker pLeftHeelFoot: calcn_l (-0.025 0.02 0.005)
  Marker pLeftFirstMetatarsal: toes_l (0.0287798 0.0321908 0.0312178)
  Marker pLeftFifthMetatarsal: toes_l (-0.0315592 0.0266583 -0.0588919)
  Marker pLeftPivotFoot: toes_l (-0.00717975 0.0273592 0.181128)
  Marker pLeftHeelCenter: calcn_l (0.057 0.0154926 0.00189644)
  Marker pLeftToe: toes_l (0.0822719 -0.00053803 -0.0167834)
  Marker pRightASI: pelvis (0.00976432 0.0101521 0.130998)
  Marker pLeftASI: pelvis (0.00611423 -0.00521842 -0.122318)
